<?xml version="1.0"?>
<?xml-stylesheet type="text/xsl" href="http://jsbsim.sourceforge.net/JSBSim.xsl"?>
<fdm_config name="EasyStar" version="2.0" release="ALPHA"
   xmlns:xsi="http://www.w3.org/2001/XMLSchema-instance"
   xsi:noNamespaceSchemaLocation="http://jsbsim.sourceforge.net/JSBSim.xsd">

 <fileheader>
  <author> Ron Jensen Aeromatic v 0.91 </author>
  <filecreationdate> 2010-03-28 </filecreationdate>
  <version>Revison: Sérgio Vinha 24-April-2020 - added compability to UPWIND project</version>
  <description> Models a EasyStar. </description>
 </fileheader>

<!--
  File:     EasyStar.xml
  Inputs:
    name:          EasyStar
    type:          glider
    max weight:    1.5 lb
    wing span:     4.5 ft
    length:        2.92 ft
    wing area:     2.57 sq-ft
    gear type:     tricycle
    retractable?:  no
    # engines:     1
    engine type:   electric
    engine layout: middle fuselage
    yaw damper?    no

  Outputs:
    wing loading:  0.58 lb/sq-ft
    CL-alpha:      5.5 per radian
    CL-0:          0.25
    CL-max:        1.4
    CD-0:          0.012
    K:             0.023

-->

 <metrics>
      <wingarea unit="FT2">        2.2792  </wingarea>
      <wingspan unit="FT">         4.5000  </wingspan>
      <chord unit="FT">             .5606  </chord>
      <htailarea unit="FT2">        .4457  </htailarea>
      <htailarm unit="FT">          .4280  </htailarm>
      <vtailarea unit="FT2">        .1606  </vtailarea>
      <vtailarm unit="FT">          .7127  </vtailarm>
     <!--
            the aerodynamic reference point, common point for
            aerodynamic forces (lift and drag)
        -->
      <location name="AERORP" unit="IN">
         <x>  4.0 </x>
         <y>  0.0 </y>
         <z>  0.0 </z>
      </location>
     <!-- the eyepoint of the pilot (left or right eye?) -->
      <location name="EYEPOINT" unit="IN">
         <x>  0.0 </x>
         <y>  0.0 </y>
         <z>  0.0 </z>
      </location>
    <!-- the visual reference point of the 3d model -->
      <location name="VRP" unit="IN">
         <x>  0.0 </x>
         <y>  0.0 </y>
         <z>  0.0 </z>
      </location>
   </metrics>

    <!-- **********************************************************************
        MASS_BALANCE
        ********************************************************************** -->
    <mass_balance>
        <ixx unit="SLUG*FT2"> 0.059 </ixx>
        <iyy unit="SLUG*FT2"> 0.02465 </iyy>
        <izz unit="SLUG*FT2"> 0.07869 </izz>
        <ixz unit="SLUG*FT2"> 0.0 </ixz>
        <emptywt unit="LBS"> 2.0 </emptywt>
        <!-- the center of gravity -->
        <location name="CG" unit="IN">
            <x> 2.0 </x>
            <y> 0.0 </y>
            <z> 0.0 </z>
        </location>
        <!--<pointmass name="PAYLOAD">-->
            <!--<weight unit="LBS"> 0.0 </weight>-->
            <!--<location name="POINTMASS" unit="IN">-->
                <!--<x> 39.3 </x>-->
                <!--<y> 0 </y>-->
                <!--<z> 35.3 </z>-->
            <!--</location>-->
        <!--</pointmass>-->
    </mass_balance>
    <!-- **********************************************************************
        UNDERCARRIAGE
        ********************************************************************** -->
    <ground_reactions>
        <contact type="STRUCTURE" name="TAIL_SKID">
            <location unit="IN">
                <x> 27.0 </x>
                <y> 0 </y>
                <z>-2.0 </z>
            </location>
            <static_friction> 1.0 </static_friction>
            <dynamic_friction> 0.8 </dynamic_friction>
            <spring_coeff unit="LBS/FT"> 12 </spring_coeff>
            <damping_coeff unit="LBS/FT/SEC"> 1 </damping_coeff>
        </contact>
        <contact type="STRUCTURE" name="NOSE">
            <location unit="IN">
                <x> -5.0 </x>
                <y> 0.0 </y>
                <z> 0.0 </z>
            </location>
            <static_friction> 1.0 </static_friction>
            <dynamic_friction> 0.8 </dynamic_friction>
            <spring_coeff unit="LBS/FT"> 12 </spring_coeff>
            <damping_coeff unit="LBS/FT/SEC"> 1 </damping_coeff>
        </contact>
        <contact type="STRUCTURE" name="BOTTOM_CANOPY">
            <location unit="IN">
                <x> 0.0 </x>
                <y> 0.0 </y>
                <z> -3.0 </z>
            </location>
            <static_friction> 1.0 </static_friction>
            <dynamic_friction> 0.8 </dynamic_friction>
            <spring_coeff unit="LBS/FT"> 12 </spring_coeff>
            <damping_coeff unit="LBS/FT/SEC"> 1 </damping_coeff>
        </contact>

        <contact type="STRUCTURE" name="LEFT_WING">
            <location unit="IN">
                <x> -3.0 </x>
                <y> -27.5 </y>
                <z> 1.0 </z>
            </location>
            <static_friction> 1.0 </static_friction>
            <dynamic_friction> 0.8 </dynamic_friction>
            <spring_coeff unit="LBS/FT"> 12 </spring_coeff>
            <damping_coeff unit="LBS/FT/SEC"> 1 </damping_coeff>
        </contact>
        <contact type="STRUCTURE" name="RIGHT_WING">
            <location unit="IN">
                <x> -3.0 </x>
                <y> 27.5 </y>
                <z> 1.0 </z>
            </location>
            <static_friction> 1.0 </static_friction>
            <dynamic_friction> 0.8 </dynamic_friction>
            <spring_coeff unit="LBS/FT"> 12 </spring_coeff>
            <damping_coeff unit="LBS/FT/SEC"> 1 </damping_coeff>
        </contact>
        <contact type="STRUCTURE" name="VERTICAL_TAIL">
            <location unit="IN">
                <x> 27.0 </x>
                <y> 0.0 </y>
                <z> 6.5 </z>
            </location>
            <static_friction> 1.0 </static_friction>
            <dynamic_friction> 0.8 </dynamic_friction>
            <spring_coeff unit="LBS/FT"> 12 </spring_coeff>
            <damping_coeff unit="LBS/FT/SEC"> 1 </damping_coeff>
        </contact>
        <contact type="STRUCTURE" name="CABIN_TOP">
            <location unit="IN">
                <x> 0.0 </x>
                <y> 0.0 </y>
                <z> 2.0 </z>
            </location>
            <static_friction> 1.0 </static_friction>
            <dynamic_friction> 0.8 </dynamic_friction>
            <spring_coeff unit="LBS/FT"> 12 </spring_coeff>
            <damping_coeff unit="LBS/FT/SEC"> 1 </damping_coeff>
        </contact>
    </ground_reactions>
    <!-- **********************************************************************
        PROPULSION
        ********************************************************************** -->
    <propulsion>
        <engine file="HB2815-2000">
            <location unit="IN">
                <x> 10.0 </x>
                <y> 0 </y>
                <z> 3.0 </z>
            </location>
            <orient unit="DEG">
                <roll> 0.0 </roll>
                <pitch> -5 </pitch>
                <yaw> 0 </yaw>
            </orient>
            <feed>0</feed>
            <thruster file="apc6x4">
                <location unit="IN">
                    <x> 10.0 </x>
                    <y> 0 </y>
                    <z> 3.0 </z>
                </location>
                <orient unit="DEG">
                    <roll> 0.0 </roll>
                    <pitch> -5.0 </pitch>
                    <yaw> 0.0 </yaw>
                </orient>
                <p_factor>1.0</p_factor>
            </thruster>
        </engine>
        <!--throws warning if tank not included, no real purpose-->
        <tank type="FUEL">    <!-- Tank number 0 -->
            <location unit="IN">
                <x> 0.0 </x>
                <y> 0.0 </y>
                <z> 0.0 </z>
            </location>
            <capacity unit="LBS"> 0.0001 </capacity>
            <contents unit="LBS"> 0 </contents>
        </tank>
    </propulsion>
    <!-- **********************************************************************
        FLIGHT CONTROLS
        ********************************************************************** -->
    <flight_control name="easystar">
        <!--
            Elevator
        -->
        <channel name="Pitch">
            <summer name="Pitch Trim Sum">
                <input>fcs/elevator-cmd-norm</input>
                <input>fcs/pitch-trim-cmd-norm</input>
                <clipto>
                    <min>-1</min>
                    <max>1</max>
                </clipto>
                <output>fcs/elevator-pos-norm</output>
            </summer>
            <aerosurface_scale name="Elevator Control">
                <input>fcs/pitch-trim-sum</input>
                <gain>0.01745</gain>
                <range>
                    <min>-28</min>
                    <max>23</max>
                </range>
                <output>fcs/elevator-pos-rad</output>
            </aerosurface_scale>
        </channel>
        <!--
            Aileron
        -->
        <channel name="Roll">
            <summer name="Roll Trim Sum">
                <input>fcs/aileron-cmd-norm</input>
                <input>fcs/roll-trim-cmd-norm</input>
                <clipto>
                    <min>-1</min>
                    <max>1</max>
                </clipto>
                <output>fcs/aileron-pos-norm</output>
            </summer>
            <aerosurface_scale name="Left Aileron Control">
                <input>fcs/roll-trim-sum</input>
                <gain>0.01745</gain>
                <range>
                    <min>-20</min>
                    <max>20</max>
                </range>
                <output>fcs/left-aileron-pos-rad</output>
            </aerosurface_scale>
            <aerosurface_scale name="Right Aileron Control">
                <input>fcs/roll-trim-sum</input>
                <gain>0.01745</gain>
                <range>
                    <min>-20</min>
                    <max>20</max>
                </range>
                <output>fcs/right-aileron-pos-rad</output>
            </aerosurface_scale>
        </channel>
        <!--
            Rudder
        -->
        <channel name="Yaw">
            <summer name="Yaw Trim Sum">
                <input>fcs/rudder-cmd-norm</input>
                <input>fcs/yaw-trim-cmd-norm</input>
                <clipto>
                    <min>-1</min>
                    <max>1</max>
                </clipto>
            </summer>
            <summer name="Yaw Mix">
                <input>fcs/yaw-trim-sum</input>
                <clipto>
                    <min>-1</min>
                    <max>1</max>
                </clipto>
            </summer>
            <aerosurface_scale name="Rudder Control">
                <input>fcs/yaw-mix</input>
                <gain>-0.01745</gain>
                <range>
                    <min>-27</min>
                    <max>27</max>
                </range>
                <output>fcs/rudder-pos-rad</output>
            </aerosurface_scale>
        </channel>
        <!--
            Throttle (linear vs rpm approx.)
        -->
        <channel name="Throttle">
            <fcs_function name="fcs/rpm-scaled-throttle">
                <function>
                    <pow>
                        <property>fcs/throttle-cmd-norm</property>
                        <value>3</value>
                    </pow>
                </function>
            </fcs_function>
            <aerosurface_scale name="Throttle Control">
                <input>fcs/rpm-scaled-throttle</input>
                <range>
                    <min>-1</min>
                    <max>1</max>
                </range>
                <output>fcs/throttle-pos-norm</output>
            </aerosurface_scale>
        </channel>

    </flight_control>

<aerodynamics>

  <axis name="LIFT">

    <function name="aero/force/Lift_alpha">
      <description>Lift due to alpha</description>
      <product>
          <property>aero/qbar-psf</property>
          <property>metrics/Sw-sqft</property>
          <table>
            <independentVar lookup="row">aero/alpha-rad</independentVar>
            <tableData>
              -0.20 -0.750
               0.00 0.250
               0.23 1.400
               0.60 0.710
            </tableData>
          </table>
      </product>
    </function>

    <function name="aero/force/Lift_flap">
       <description>Delta Lift due to flaps</description>
       <product>
           <property>aero/qbar-psf</property>
           <property>metrics/Sw-sqft</property>
           <property>fcs/flap-pos-deg</property>
           <value> 0.01333 </value>
       </product>
    </function>

    <function name="aero/force/Lift_speedbrake">
       <description>Delta Lift due to speedbrake</description>
       <product>
           <property>aero/qbar-psf</property>
           <property>metrics/Sw-sqft</property>
           <property>fcs/speedbrake-pos-norm</property>
           <value>0</value>
       </product>
    </function>

    <function name="aero/force/Lift_elevator">
       <description>Lift due to Elevator Deflection</description>
       <product>
           <property>aero/qbar-psf</property>
           <property>metrics/Sw-sqft</property>
           <property>fcs/elevator-pos-rad</property>
           <value>0.2</value>
       </product>
    </function>

  </axis>

  <axis name="DRAG">

    <function name="aero/force/Drag_basic">
       <description>Drag at zero lift</description>
       <product>
          <property>aero/qbar-psf</property>
          <property>metrics/Sw-sqft</property>
          <table>
            <independentVar lookup="row">aero/alpha-rad</independentVar>
            <tableData>
             -1.57    1.500
             -0.26    0.036
              0.00    0.028
              0.26    0.036
              1.57    1.500
            </tableData>
          </table>
       </product>
    </function>

    <function name="aero/force/Drag_induced">
       <description>Induced drag</description>
         <product>
           <property>aero/qbar-psf</property>
           <property>metrics/Sw-sqft</property>
           <property>aero/cl-squared</property>
           <value>0.04</value>
         </product>
    </function>

    <function name="aero/force/Drag_mach">
       <description>Drag due to mach</description>
        <product>
          <property>aero/qbar-psf</property>
          <property>metrics/Sw-sqft</property>
          <table>
            <independentVar lookup="row">velocities/mach</independentVar>
            <tableData>
                0.00      0.000
                0.7       0.000
                1.10      0.023
                1.80      0.015
            </tableData>
          </table>
        </product>
    </function>

    <function name="aero/force/Drag_flap">
       <description>Drag due to flaps</description>
         <product>
           <property>aero/qbar-psf</property>
           <property>metrics/Sw-sqft</property>
           <property>fcs/flap-pos-deg</property>
           <value> 0.00100 </value>
         </product>
    </function>

    <function name="aero/force/Drag_speedbrake">
       <description>Drag due to speedbrakes</description>
         <product>
           <property>aero/qbar-psf</property>
           <property>metrics/Sw-sqft</property>
           <property>fcs/speedbrake-pos-norm</property>
           <value>0.028</value>
         </product>
    </function>

    <function name="aero/force/Drag_beta">
       <description>Drag due to sideslip</description>
       <product>
          <property>aero/qbar-psf</property>
          <property>metrics/Sw-sqft</property>
          <table>
            <independentVar lookup="row">aero/beta-rad</independentVar>
            <tableData>
              -1.57       1.230
              -0.26       0.050
               0.00       0.000
               0.26       0.050
               1.57       1.230
            </tableData>
          </table>
       </product>
    </function>

    <function name="aero/force/Drag_elevator">
       <description>Drag due to Elevator Deflection</description>
       <product>
           <property>aero/qbar-psf</property>
           <property>metrics/Sw-sqft</property>
           <abs><property>fcs/elevator-pos-norm</property></abs>
           <value>0.04</value>
       </product>
    </function>

  </axis>

  <axis name="SIDE">

    <function name="aero/force/Side_beta">
       <description>Side force due to beta</description>
       <product>
           <property>aero/qbar-psf</property>
           <property>metrics/Sw-sqft</property>
           <property>aero/beta-rad</property>
           <value>-1</value>
       </product>
    </function>

  </axis>

  <axis name="ROLL">

    <function name="aero/moment/Roll_beta">
       <description>Roll moment due to beta</description>
       <product>
           <property>aero/qbar-psf</property>
           <property>metrics/Sw-sqft</property>
           <property>metrics/bw-ft</property>
           <property>aero/beta-rad</property>
           <value>-0.1</value>
       </product>
    </function>

    <function name="aero/moment/Roll_damp">
       <description>Roll moment due to roll rate</description>
       <product>
           <property>aero/qbar-psf</property>
           <property>metrics/Sw-sqft</property>
           <property>metrics/bw-ft</property>
           <property>aero/bi2vel</property>
           <property>velocities/p-aero-rad_sec</property>
           <value>-0.4</value>
       </product>
    </function>

    <function name="aero/moment/Roll_yaw">
       <description>Roll moment due to yaw rate</description>
       <product>
           <property>aero/qbar-psf</property>
           <property>metrics/Sw-sqft</property>
           <property>metrics/bw-ft</property>
           <property>aero/bi2vel</property>
           <property>velocities/r-aero-rad_sec</property>
           <value>0.15</value>
       </product>
    </function>

    <function name="aero/moment/Roll_aileron">
       <description>Roll moment due to aileron</description>
       <product>
          <property>aero/qbar-psf</property>
          <property>metrics/Sw-sqft</property>
          <property>metrics/bw-ft</property>
          <property>fcs/left-aileron-pos-rad</property>
          <table>
            <independentVar lookup="row">velocities/mach</independentVar>
            <tableData>
              0.0    0.170
              2.0    0.057
            </tableData>
          </table>
       </product>
    </function>

    <function name="aero/moment/Roll_rudder">
       <description>Roll moment due to rudder</description>
       <product>
           <property>aero/qbar-psf</property>
           <property>metrics/Sw-sqft</property>
           <property>metrics/bw-ft</property>
           <property>fcs/rudder-pos-rad</property>
           <value>0.01</value>
       </product>
    </function>

  </axis>

  <axis name="PITCH">

    <function name="aero/moment/Pitch_alpha">
       <description>Pitch moment due to alpha</description>
       <product>
           <property>aero/qbar-psf</property>
           <property>metrics/Sw-sqft</property>
           <property>metrics/cbarw-ft</property>
           <property>aero/alpha-rad</property>
           <value>-0.5</value>
       </product>
    </function>

    <function name="aero/moment/Pitch_elevator">
       <description>Pitch moment due to elevator</description>
       <product>
          <property>aero/qbar-psf</property>
          <property>metrics/Sw-sqft</property>
          <property>metrics/cbarw-ft</property>
          <property>fcs/elevator-pos-rad</property>
          <table>
            <independentVar lookup="row">velocities/mach</independentVar>
            <tableData>
              0.0     -1.100
              2.0     -0.275
            </tableData>
          </table>
       </product>
    </function>

    <function name="aero/moment/Pitch_damp">
       <description>Pitch moment due to pitch rate</description>
       <product>
           <property>aero/qbar-psf</property>
           <property>metrics/Sw-sqft</property>
           <property>metrics/cbarw-ft</property>
           <property>aero/ci2vel</property>
           <property>velocities/q-aero-rad_sec</property>
           <value>-12</value>
       </product>
    </function>

    <function name="aero/moment/Pitch_alphadot">
       <description>Pitch moment due to alpha rate</description>
       <product>
           <property>aero/qbar-psf</property>
           <property>metrics/Sw-sqft</property>
           <property>metrics/cbarw-ft</property>
           <property>aero/ci2vel</property>
           <property>aero/alphadot-rad_sec</property>
           <value>-7</value>
       </product>
    </function>

  </axis>

  <axis name="YAW">

    <function name="aero/moment/Yaw_beta">
       <description>Yaw moment due to beta</description>
       <product>
           <property>aero/qbar-psf</property>
           <property>metrics/Sw-sqft</property>
           <property>metrics/bw-ft</property>
           <property>aero/beta-rad</property>
           <value>0.12</value>
       </product>
    </function>

    <function name="aero/moment/Yaw_damp">
       <description>Yaw moment due to yaw rate</description>
       <product>
           <property>aero/qbar-psf</property>
           <property>metrics/Sw-sqft</property>
           <property>metrics/bw-ft</property>
           <property>aero/bi2vel</property>
           <property>velocities/r-aero-rad_sec</property>
           <value>-0.15</value>
       </product>
    </function>

    <function name="aero/moment/Yaw_rudder">
       <description>Yaw moment due to rudder</description>
       <product>
           <property>aero/qbar-psf</property>
           <property>metrics/Sw-sqft</property>
           <property>metrics/bw-ft</property>
           <property>fcs/rudder-pos-rad</property>
           <value>-0.1</value>
       </product>
    </function>

    <function name="aero/moment/Yaw_aileron">
       <description>Adverse yaw</description>
       <product>
           <property>aero/qbar-psf</property>
           <property>metrics/Sw-sqft</property>
           <property>metrics/bw-ft</property>
           <property>fcs/left-aileron-pos-rad</property>
           <value>-0.01</value>
       </product>
    </function>

  </axis>

 </aerodynamics>

	<input port="5505"/>

</fdm_config>
